# Template of LAMMPS input file for stage 1 (heating) of the simulated annealing of nanoparticles
# Author: Jonathan Yik Chang Ting
# Date: 15/10/2020

# --------------- INITIALIZATION ---------------
clear           # Clear all memory
units           metal  # Report in g/mol, A, ps, eV, K, bars
boundary        p p p  # Periodic boundaries in x-, y-, z- directions
atom_style      atomic

# --------------- ATOM DEFINITION ---------------
read_restart    {INP_FILE_NAME}S0.mpiio.rst
reset_timestep  0

# --------------- FORCE FIELDS ---------------
pair_style      eam/alloy
pair_coeff      * * {POT_FILE} {ELEMENT1} {ELEMENT2}
neighbor        2.0 bin  # build list by binning, add 2 A skin
neigh_modify    delay 10 check yes  # Wait 10 steps after building, build only when atom moved > skin/2

# --------------- SETTINGS ---------------
thermo          {S1_THER_INT}  # Thermodynamic output frequency
thermo_style    custom step time temp press pe ke etotal
fix             timeLimit all halt 1000 tlimit > {TIME_LIMIT} error soft message yes  # Continue with next part if time limit exceeded
fix             zeroMomentum all momentum 1 linear 1 1 1 angular rescale  # Reset linear & angular momenta to 0 every step
fix             nhS1 all nvt temp {INIT_TEMP} {HEAT_TEMP} $(100.0*dt)
compute         aRDF all rdf 200
fix             avgRDF all ave/time 1000 100 100000 c_aRDF[*] file {INP_FILE_NAME}S1.rdf mode vector   # Every 100 ps (25 K) averaged by 100 samples with interval of 1 ps
dump            dumpS1 all custom/mpiio {S1_DUMP_INT} {INP_FILE_NAME}S1.*.mpiio.lmp id type element x y z
dump_modify     dumpS1 element {ELEMENT1} {ELEMENT2} pad 8

# --------------- SIMULATION RUNS ---------------
print           "--------------- HEATING TO {HEAT_TEMP} K ---------------"
restart         100000 {INP_FILE_NAME}S1.*.mpiio.rst
run             {S1_PERIOD}
unfix           nhS1
unfix           avgRDF
undump          dumpS1

# --------------- DONE ---------------
print ""
print "DONE!"
print "------------------------------------------------------------------------------------------------------------------------------"
print ""
